// -----------------------------------------------------------------------//
// Autor: Paulo Radatz
// e-mail: paulo.radatz@gmail.com
// -----------------------------------------------------------------------//

ClearAll

compile "C:\PauloRadatz\GitHub\SBSE2022\feeders\123Bus\IEEE123Master.dss"
BusCoords "C:\PauloRadatz\GitHub\SBSE2022\feeders\123Bus\BusCoords.dat"

solve

show taps
